ρ_1 := 0.55
13
ρ_2 := 0.5
[
    0, 1, 0, 0, 0, 0, 0, 0, 0, 0, 0, 0, 0;
    0, 0, 1, 0, 0, 0, 0, 0, 0, 0, 0, 0, 0;
    0, 0, 0, ρ_1, 1 - ρ_1, 0, 0, 0, 0, 0, 0, 0, 0;
    0, 0, 0, 0, 0, ρ_1, 1 - ρ_1, 0, 0, 0, 0, 0, 0;
    0, 0, 1 - ρ_2, 0, 0, 0, ρ_2, 0, 0, 0, 0, 0, 0;
    0, 0, □, □, □, □, □, □, □, □, □, □, □
]
